# OpenSim document version 30000
InverseKinematicsTool subject01:
  model_file: /content/multifidus_atrophy/models/FBLSmodel.osim
  constraint_weight: 20
  accuracy: 1e-5
  marker_file: subject01_Jog01.trc
  time_range: 0 0.85667
  output_motion_file: subject01_ik_Jog.mot
  IKTaskSet gait2354_IK:
    IKMarkerTask C7: apply=true weight=1
    IKMarkerTask LSHO: apply=true weight=250
    IKMarkerTask RSHO: apply=true weight=250
    IKMarkerTask STRN: apply=true weight=1
    IKMarkerTask T10: apply=true weight=1
    IKMarkerTask RUPA: apply=false weight=1
    IKMarkerTask LUPA: apply=false weight=1
    IKMarkerTask RELB: apply=true weight=250
    IKMarkerTask LELB: apply=true weight=250
    IKMarkerTask LFRA: apply=false weight=1
    IKMarkerTask RFRA: apply=false weight=1
    IKMarkerTask RWRB: apply=true weight=150
    IKMarkerTask RWRA: apply=true weight=150
    IKMarkerTask RFIN: apply=true weight=1
    IKMarkerTask LWRB: apply=true weight=150
    IKMarkerTask LWRA: apply=true weight=150
    IKMarkerTask LFIN: apply=true weight=1
    IKMarkerTask RGTR: apply=true weight=350
    IKMarkerTask LGTR: apply=true weight=350
    IKMarkerTask RASI: apply=true weight=800
    IKMarkerTask LASI: apply=true weight=800
    IKMarkerTask RPSI: apply=true weight=800
    IKMarkerTask LPSI: apply=true weight=800
    IKMarkerTask RANK: apply=true weight=200
    IKMarkerTask LANK: apply=true weight=200
    IKMarkerTask LHEE: apply=true weight=250
    IKMarkerTask LTOE: apply=true weight=350
    IKMarkerTask RHEE: apply=true weight=250
    IKMarkerTask RTOE: apply=true weight=350
    IKMarkerTask RMT5: apply=true weight=100
    IKMarkerTask LMT5: apply=true weight=100
    IKMarkerTask RKNE: apply=true weight=600
    IKMarkerTask LKNE: apply=true weight=600
    IKMarkerTask RFP1: apply=false weight=10
    IKMarkerTask RFP2: apply=false weight=10
    IKMarkerTask RFP3: apply=false weight=10
    IKMarkerTask RFM1: apply=false weight=10
    IKMarkerTask RFM2: apply=false weight=10
    IKMarkerTask RFM3: apply=false weight=10
    IKMarkerTask RFA1: apply=false weight=100
    IKMarkerTask RFA2: apply=false weight=100
    IKMarkerTask RFA3: apply=false weight=100
    IKMarkerTask LFP1: apply=false weight=10
    IKMarkerTask LFP2: apply=false weight=10
    IKMarkerTask LFP3: apply=false weight=10
    IKMarkerTask LFM1: apply=false weight=10
    IKMarkerTask LFM2: apply=false weight=10
    IKMarkerTask LFM3: apply=false weight=10
    IKMarkerTask LFA1: apply=false weight=100
    IKMarkerTask LFA2: apply=false weight=100
    IKMarkerTask LFA3: apply=false weight=100
    IKMarkerTask RTP1: apply=false weight=10
    IKMarkerTask RTP2: apply=false weight=10
    IKMarkerTask RTP3: apply=false weight=10
    IKMarkerTask RTA1: apply=true weight=50
    IKMarkerTask RTA2: apply=false weight=10
    IKMarkerTask RTA3: apply=false weight=10
    IKMarkerTask LTP1: apply=false weight=10
    IKMarkerTask LTP2: apply=false weight=10
    IKMarkerTask LTP3: apply=false weight=10
    IKMarkerTask LTA1: apply=true weight=50
    IKCoordinateTask subtalar_angle_r: apply=true weight=1000 value_type=default_value value=0
    IKCoordinateTask mtp_angle_r: apply=true weight=1000 value_type=default_value value=0
    IKCoordinateTask subtalar_angle_l: apply=true weight=1000 value_type=default_value value=0
    IKCoordinateTask mtp_angle_l: apply=true weight=1000 value_type=default_value value=0
