# OpenSim document version 30000
AnalyzeTool subject01_SO:
  model_file: /content/multifidus_atrophy/scale/subject01_scaled.osim
  replace_force_set: false
  force_set_files: FBLS_SO_Actuators.xml
  results_directory: Results
  output_precision: 20
  initial_time: 0.083333
  final_time: 0.527
  solve_for_equilibrium_for_auxiliary_states: false
  maximum_number_of_integrator_steps: 20000
  maximum_integrator_step_size: 1
  minimum_integrator_step_size: 1e-8
  integrator_error_tolerance: 1e-5
  external_loads_file: /content/multifidus_atrophy/RRA/subject01_Jog01_kinetics.xml
  coordinates_file: /content/multifidus_atrophy/RRA/subject01_Kinematics_q.sto
  lowpass_cutoff_frequency_for_coordinates: -1
  AnalysisSet Analyses:
    StaticOptimization: start_time=0.083333 end_time=0.527 step_interval=1 in_degrees=true use_model_force_set=true
        activation_exponent=2 use_muscle_physiology=true optimizer_convergence_criterion=0.0001
        optimizer_max_iterations=100
